# OpenSim document version 40500
InverseKinematicsTool:
  time_range: -2.995 4.995
  marker_file: ../trc/fast_skatebelt/PelvisPull_LeftStance_1.trc
  IKTaskSet:
    IKMarkerTask RSIAS: apply=true weight=1
    IKMarkerTask LSIAS: apply=true weight=1
    IKMarkerTask RSHO: apply=true weight=1
    IKMarkerTask LSHO: apply=true weight=1
    IKMarkerTask RKNEE_lat: apply=true weight=1
    IKMarkerTask RKNEE_med: apply=true weight=1
    IKMarkerTask RFEM1: apply=true weight=1
    IKMarkerTask RFEM2: apply=true weight=1
    IKMarkerTask RFEM3: apply=true weight=1
    IKMarkerTask RANK_lat: apply=true weight=1
    IKMarkerTask RANK_med: apply=true weight=1
    IKMarkerTask RTIB1: apply=true weight=1
    IKMarkerTask RTIB2: apply=true weight=1
    IKMarkerTask RTIB3: apply=true weight=1
    IKMarkerTask RCAL: apply=true weight=1
    IKMarkerTask RMTP5: apply=true weight=1
    IKMarkerTask LKNEE_lat: apply=true weight=1
    IKMarkerTask LKNEE_med: apply=true weight=1
    IKMarkerTask LFEM1: apply=true weight=1
    IKMarkerTask LFEM2: apply=true weight=1
    IKMarkerTask LFEM3: apply=true weight=1
    IKMarkerTask LANK_lat: apply=true weight=1
    IKMarkerTask LANK_med: apply=true weight=1
    IKMarkerTask LTIB1: apply=true weight=1
    IKMarkerTask LTIB2: apply=true weight=1
    IKMarkerTask LTIB3: apply=true weight=1
    IKMarkerTask LCAL: apply=true weight=1
    IKMarkerTask LMTP5: apply=true weight=1
    IKMarkerTask RELB_lat: apply=true weight=1
    IKMarkerTask RWRA: apply=true weight=1
    IKMarkerTask RWRB: apply=true weight=1
    IKMarkerTask LWRA: apply=true weight=1
    IKMarkerTask LWRB: apply=true weight=1
    IKMarkerTask C7: apply=true weight=1
    IKMarkerTask LUA_1: apply=true weight=1
    IKMarkerTask LLA_1: apply=true weight=1
    IKMarkerTask RUA_1: apply=true weight=1
    IKMarkerTask RLA_1: apply=true weight=1
    IKMarkerTask C7_2: apply=true weight=1
